# OpenSim document version 30000
ControlSet SwingControls:
  ControlLinear [values shared by the 19 below unless stated]: is_model_control=true extrapolate=true default_min=0.02
      default_max=1 filter_on=false kp=100 kv=20
  ControlLinear ra_wr_s_p_moment
  ControlLinear ra_wr_e_f_moment
  ControlLinear ra_wr_ad_ab_moment
  ControlLinear ra_cmc1_ad_ab_moment
  ControlLinear ra_cmc1_f_e_moment
  ControlLinear ra_mcp1_f_e_moment
  ControlLinear ra_ip1_f_e_moment
  ControlLinear ra_mcp2_e_f_moment
  ControlLinear ra_pip2_e_f_moment
  ControlLinear ra_dip2_e_f_moment
  ControlLinear ra_mcp3_e_f_moment
  ControlLinear ra_pip3_e_f_moment
  ControlLinear ra_dip3_e_f_moment
  ControlLinear ra_mcp4_e_f_moment
  ControlLinear ra_pip4_e_f_moment
  ControlLinear ra_dip4_e_f_moment
  ControlLinear ra_mcp5_e_f_moment
  ControlLinear ra_pip5_e_f_moment
  ControlLinear ra_dip5_e_f_moment
