# OpenSim document version 40000
ForceSet:
  CoordinateActuator elv_angle_moment: coordinate=elv_angle optimal_force=1
  CoordinateActuator shoulder_elv_moment: coordinate=shoulder_elv optimal_force=1
  CoordinateActuator shoulder_rot_moment: coordinate=shoulder_rot optimal_force=1
  CoordinateActuator phys_coord_ab_ad_moment: coordinate=phys_coord_ab_ad optimal_force=1
  CoordinateActuator phys_coord_rot_moment: coordinate=phys_coord_rot optimal_force=1
  CoordinateActuator phys_coord_fl_ex_moment: coordinate=phys_coord_fl_ex optimal_force=1
  CoordinateActuator ra_el_e_f_moment: coordinate=ra_el_e_f optimal_force=1
  CoordinateActuator ra_wr_s_p_moment: coordinate=ra_wr_s_p optimal_force=1
  CoordinateActuator ra_wr_e_f_moment: coordinate=ra_wr_e_f optimal_force=1
  CoordinateActuator ra_wr_ad_ab_moment: coordinate=ra_wr_ad_ab optimal_force=1
  CoordinateActuator ra_cmc1_ad_ab_moment: coordinate=ra_cmc1_ad_ab optimal_force=1
  CoordinateActuator ra_cmc1_f_e_moment: coordinate=ra_cmc1_f_e optimal_force=1
  CoordinateActuator ra_mcp1_f_e_moment: coordinate=ra_mcp1_f_e optimal_force=1
  CoordinateActuator ra_ip1_f_e_moment: coordinate=ra_ip1_f_e optimal_force=1
  CoordinateActuator ra_mcp2_e_f_moment: coordinate=ra_mcp2_e_f optimal_force=1
  CoordinateActuator ra_pip2_e_f_moment: coordinate=ra_pip2_e_f optimal_force=1
  CoordinateActuator ra_dip2_e_f_moment: coordinate=ra_dip2_e_f optimal_force=1
  CoordinateActuator ra_mcp3_e_f_moment: coordinate=ra_mcp3_e_f optimal_force=1
  CoordinateActuator ra_pip3_e_f_moment: coordinate=ra_pip3_e_f optimal_force=1
  CoordinateActuator ra_dip3_e_f_moment: coordinate=ra_dip3_e_f optimal_force=1
  CoordinateActuator ra_mcp4_e_f_moment: coordinate=ra_mcp4_e_f optimal_force=1
  CoordinateActuator ra_pip4_e_f_moment: coordinate=ra_pip4_e_f optimal_force=1
  CoordinateActuator ra_dip4_e_f_moment: coordinate=ra_dip4_e_f optimal_force=1
  CoordinateActuator ra_mcp5_e_f_moment: coordinate=ra_mcp5_e_f optimal_force=1
  CoordinateActuator ra_pip5_e_f_moment: coordinate=ra_pip5_e_f optimal_force=1
  CoordinateActuator ra_dip5_e_f_moment: coordinate=ra_dip5_e_f optimal_force=1
