# OpenSim document version 40000
ForwardTool HAPTIX_arm_model_v1:
  replace_force_set: false
  force_set_files: ../actuator files/Trial_actuators.xml
  results_directory: ..//C:/Repositories/os_hand_kin/forward dynamics/../Model
  output_precision: 8
  initial_time: 0
  final_time: 0.992
  solve_for_equilibrium_for_auxiliary_states: false
  maximum_number_of_integrator_steps: 20000
  maximum_integrator_step_size: 1
  minimum_integrator_step_size: 1e-8
  integrator_error_tolerance: 1e-5
  use_specified_dt: false
  ControllerSet Controllers:
    ControlSetController: controls_file=(../../inverse dynamics/results/Sim_Tor_idSubject6_idTrialType202.sto)
